*Heading
** Job name: hinged#3gentle Model name: hinged 3 gentle material
** Generated by: Abaqus/CAE 2023
*Preprint, echo=NO, model=NO, history=NO, contact=NO
**
** PARTS
**
*Part, name=bottom
*Node
      1,          50.,          50.,           0.
      2,           0.,          50.,           0.
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*Element, type=C3D8R
  1,  377,  385,   42,   41, 2573, 2581,  533,  534
  2,  385,  386,   43,   42, 2581, 2582,  532,  533
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*Nset, nset=_PickedSet15, internal, generate
    1,  6672,     1
*Elset, elset=_PickedSet15, internal, generate
    1,  5760,     1
** Section: specimen
*Solid Section, elset=_PickedSet15, material=gentle#3
,
*End Part
**
*Part, name=bottom-plate
*Node
      1,           0.,           0.,          50.
      2,           0.,           0.,           0.
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*Element, type=C3D8R
   1,  261,  269,   37,   36, 1853, 1861,  417,  418
   2,  269,  270,   38,   37, 1861, 1862,  416,  417
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*Nset, nset=_PickedSet2, internal, generate
    1,  5004,     1
*Elset, elset=_PickedSet2, internal, generate
    1,  4224,     1
** Section: plate
*Solid Section, elset=_PickedSet2, material=steel
,
*End Part
**
*Part, name=bottom-rigid
*Node
      1,          50.,         -55.,           0.
      2,          50.,         -60.,           0.
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*Element, type=R3D4
 1,  42, 105, 106,  43
 2,  43, 106, 107,  44
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*Node
    863,           0.,         -60.,           0.
*Nset, nset=bottom-rigid-RefPt_, internal
863,
*Nset, nset=_PickedSet11, internal
 863,
*Elset, elset=_Surf-1_SPOS, internal, generate
 462,  860,    1
*Surface, type=ELEMENT, name=Surf-1
_Surf-1_SPOS, SPOS
*Elset, elset=bottom-rigid, generate
   1,  860,    1
*Element, type=MASS, elset=_PickedSet11_Inertia-1_
861, 863
*Mass, elset=_PickedSet11_Inertia-1_
1.,
*End Part
**
*Part, name=notch-bottom
*Node
      1,           0.,         73.5,           0.
      2,           0.,         73.5,          41.
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*Element, type=C3D10
  1,   55,   11,  184,  237,  693,  692,  691,  695,  694,  696
  2,   55,  184,  253,  237,  691,  698,  697,  695,  696,  699
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*Nset, nset=_PickedSet2, internal, generate
    1,  3977,     1
*Elset, elset=_PickedSet2, internal, generate
    1,  1915,     1
** Section: specimen
*Solid Section, elset=_PickedSet2, material=gentle#3
,
*End Part
**
*Part, name=notch-middle
*Node
      1,           0.,         76.5,           0.
      2,           0.,         76.5,          41.
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*Element, type=C3D8R
 1, 178, 180,  33,  32, 232, 234,  50,  51
 2, 180, 181,  34,  33, 234, 235,  49,  50
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*Nset, nset=_PickedSet2, internal, generate
   1,  598,    1
*Elset, elset=_PickedSet2, internal, generate
   1,  272,    1
** Section: specimen
*Solid Section, elset=_PickedSet2, material=gentle#3
,
*End Part
**
*Part, name=notch-top
*Node
      1,           0.,          77.,         -50.
      2,           0.,          77.,           0.
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*Element, type=C3D10
  1,  191,  686,  261,   20,  691,  690,  689,  693,  692,  694
  2,  286,   68,  202,  261,  697,  696,  695,  699,  698,  700
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*Nset, nset=_PickedSet2, internal, generate
    1,  3964,     1
*Elset, elset=_PickedSet2, internal, generate
    1,  1906,     1
** Section: specimen
*Solid Section, elset=_PickedSet2, material=gentle#3
,
*End Part
**
*Part, name=top
*Node
      1,         -50.,         100.,           0.
      2,           0.,         100.,           0.
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*Element, type=C3D8R
  1,  377,  385,   42,   41, 2573, 2581,  533,  534
  2,  385,  386,   43,   42, 2581, 2582,  532,  533
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*Nset, nset=_PickedSet3, internal, generate
    1,  6672,     1
*Elset, elset=_PickedSet3, internal, generate
    1,  5760,     1
** Section: specimen
*Solid Section, elset=_PickedSet3, material=gentle#3
,
*End Part
**
*Part, name=top-plate
*Node
      1,           0.,         205.,          50.
      2,           0.,         205.,           0.
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*Element, type=C3D8R
   1,  261,  269,   37,   36, 1853, 1861,  417,  418
   2,  269,  270,   38,   37, 1861, 1862,  416,  417
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*Nset, nset=_PickedSet2, internal, generate
    1,  5004,     1
*Elset, elset=_PickedSet2, internal, generate
    1,  4224,     1
** Section: plate
*Solid Section, elset=_PickedSet2, material=steel
,
*End Part
**
*Part, name=top-rigid
*Node
      1,          50.,         210.,           0.
      2,          50.,         205.,           0.
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*Element, type=R3D4
 1,  42, 105, 106,  43
 2,  43, 106, 107,  44
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*Node
    863,           3.,         210.,           0.
*Nset, nset=top-rigid-RefPt_, internal
863,
*Nset, nset=_PickedSet14, internal
 863,
*Elset, elset=_Surf-1_SPOS, internal, generate
  65,  461,    1
*Surface, type=ELEMENT, name=Surf-1
_Surf-1_SPOS, SPOS
*Elset, elset=top-rigid, generate
   1,  860,    1
*Element, type=MASS, elset=_PickedSet14_Inertia-1_
861, 863
*Mass, elset=_PickedSet14_Inertia-1_
1.,
*End Part
**
**
** ASSEMBLY
**
*Assembly, name=Assembly
**
*Instance, name=bottom-1, part=bottom
*End Instance
**
*Instance, name=top-1, part=top
*End Instance
**
*Instance, name=notch-bottom-1, part=notch-bottom
*End Instance
**
*Instance, name=notch-middle-1, part=notch-middle
*End Instance
**
*Instance, name=notch-top-1, part=notch-top
*End Instance
**
*Instance, name=bottom-plate-1, part=bottom-plate
*End Instance
**
*Instance, name=top-plate-1, part=top-plate
*End Instance
**
*Instance, name=bottom-rigid-1, part=bottom-rigid
*End Instance
**
*Instance, name=top-rigid-1, part=top-rigid
*End Instance
**
*Nset, nset=bottom-4mm, instance=bottom-1
   6,   8,  10,  79,  80,  81
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*Nset, nset=bottom-4mm, instance=notch-bottom-1
 9,
*Nset, nset=bottom-50mm, instance=bottom-1
   1,   3,   7,   9,  34,  35
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*Nset, nset=bottom-224mm, instance=bottom-1
   51,   54,  119,  171,  557,  558
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*Nset, nset=top-4mm, instance=top-1
   4,   6,   9,  10,  79,  80
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*Nset, nset=top-50mm, instance=top-1
   1,   3,   7,   8,  34,  35
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*Nset, nset=top-224mm, instance=top-1
   51,   54,  129,  132,  557,  558
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*Nset, nset=_PickedSet238, internal, instance=top-rigid-1
 863,
*Nset, nset=_PickedSet239, internal, instance=bottom-rigid-1
 863,
*Elset, elset=__PickedSurf187_S2, internal, instance=bottom-1
  385,  386,  387,  388,  389,  390
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*Surface, type=ELEMENT, name=_PickedSurf187, internal
__PickedSurf187_S2, S2
*Elset, elset=__PickedSurf188_S4, internal, instance=notch-bottom-1
    2,   30,   36,   37,   50,   57
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*Elset, elset=__PickedSurf188_S3, internal, instance=notch-bottom-1
   15,   19,   20,   21,   22,   44
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*Elset, elset=__PickedSurf188_S2, internal, instance=notch-bottom-1
   25,   31,   34,   42,   47,   67
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*Elset, elset=__PickedSurf188_S1, internal, instance=notch-bottom-1
   24,   32,   33,   39,   52,   58
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*Surface, type=ELEMENT, name=_PickedSurf188, internal
__PickedSurf188_S4, S4
__PickedSurf188_S3, S3
__PickedSurf188_S2, S2
__PickedSurf188_S1, S1
*Elset, elset=__PickedSurf189_S2, internal, instance=notch-middle-1, generate
   1,  272,    1
*Surface, type=ELEMENT, name=_PickedSurf189, internal
__PickedSurf189_S2, S2
*Elset, elset=__PickedSurf190_S3, internal, instance=notch-bottom-1
   45,   65,  108,  168,  186,  188
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*Elset, elset=__PickedSurf190_S4, internal, instance=notch-bottom-1
   38,  107,  305,  497,  510,  515
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*Elset, elset=__PickedSurf190_S1, internal, instance=notch-bottom-1
   76,  346,  392,  499,  505,  519
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*Elset, elset=__PickedSurf190_S2, internal, instance=notch-bottom-1
  314,  362,  370,  371,  394,  402
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*Surface, type=ELEMENT, name=_PickedSurf190, internal
__PickedSurf190_S3, S3
__PickedSurf190_S4, S4
__PickedSurf190_S2, S2
__PickedSurf190_S1, S1
*Elset, elset=__PickedSurf191_S1, internal, instance=notch-middle-1, generate
   1,  272,    1
*Surface, type=ELEMENT, name=_PickedSurf191, internal
__PickedSurf191_S1, S1
*Elset, elset=__PickedSurf192_S4, internal, instance=notch-top-1
   27,   30,   32,   47,   59,   96
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*Elset, elset=__PickedSurf192_S1, internal, instance=notch-top-1
    8,   10,   14,   28,   39,   46
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*Elset, elset=__PickedSurf192_S3, internal, instance=notch-top-1
    7,  140,  192,  352,  502,  525
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*Elset, elset=__PickedSurf192_S2, internal, instance=notch-top-1
    2,    4,    9,   16,   18,   21
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*Surface, type=ELEMENT, name=_PickedSurf192, internal
__PickedSurf192_S4, S4
__PickedSurf192_S1, S1
__PickedSurf192_S2, S2
__PickedSurf192_S3, S3
*Elset, elset=__PickedSurf193_S2, internal, instance=top-1
  385,  386,  387,  388,  389,  390
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*Surface, type=ELEMENT, name=_PickedSurf193, internal
__PickedSurf193_S2, S2
*Elset, elset=__PickedSurf194_S4, internal, instance=notch-top-1
    6,   66,   93,  107,  173,  228
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*Elset, elset=__PickedSurf194_S3, internal, instance=notch-top-1
   38,   48,   51,   54,   60,   65
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*Elset, elset=__PickedSurf194_S1, internal, instance=notch-top-1
   52,   62,   82,  128,  269,  270
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*Elset, elset=__PickedSurf194_S2, internal, instance=notch-top-1
    3,   94,  176,  220,  221,  262
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*Surface, type=ELEMENT, name=_PickedSurf194, internal
__PickedSurf194_S4, S4
__PickedSurf194_S3, S3
__PickedSurf194_S2, S2
__PickedSurf194_S1, S1
*Elset, elset=__PickedSurf199_S1, internal, instance=bottom-plate-1
    1,    2,    3,    4,    5,    6
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*Surface, type=ELEMENT, name=_PickedSurf199, internal
__PickedSurf199_S1, S1
*Elset, elset=__PickedSurf200_S2, internal, instance=bottom-1
 2305, 2306, 2307, 2308, 2309, 2310
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*Surface, type=ELEMENT, name=_PickedSurf200, internal
__PickedSurf200_S2, S2
*Elset, elset=__PickedSurf222_S2, internal, instance=top-plate-1
  961,  962,  963,  964,  965,  966
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*Surface, type=ELEMENT, name=_PickedSurf222, internal
__PickedSurf222_S2, S2
*Elset, elset=__PickedSurf223_S2, internal, instance=top-1
 2305, 2306, 2307, 2308, 2309, 2310
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*Surface, type=ELEMENT, name=_PickedSurf223, internal
__PickedSurf223_S2, S2
*Elset, elset=__PickedSurf234_SPOS, internal, instance=top-rigid-1, generate
  65,  461,    1
*Surface, type=ELEMENT, name=_PickedSurf234, internal
__PickedSurf234_SPOS, SPOS
*Elset, elset=__PickedSurf235_S1, internal, instance=top-plate-1
    1,    2,    3,    4,    5,    6
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*Surface, type=ELEMENT, name=_PickedSurf235, internal
__PickedSurf235_S1, S1
*Elset, elset=__PickedSurf236_SPOS, internal, instance=bottom-rigid-1, generate
 462,  860,    1
*Surface, type=ELEMENT, name=_PickedSurf236, internal
__PickedSurf236_SPOS, SPOS
*Elset, elset=__PickedSurf237_S2, internal, instance=bottom-plate-1
  961,  962,  963,  964,  965,  966
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*Surface, type=ELEMENT, name=_PickedSurf237, internal
__PickedSurf237_S2, S2
*Rigid Body, ref node=bottom-rigid-1.bottom-rigid-RefPt_, elset=bottom-rigid-1.bottom-rigid
*Rigid Body, ref node=top-rigid-1.top-rigid-RefPt_, elset=top-rigid-1.top-rigid
** Constraint: Constraint-1
*Tie, name=Constraint-1, adjust=yes
_PickedSurf188, _PickedSurf187
** Constraint: Constraint-2
*Tie, name=Constraint-2, adjust=yes
_PickedSurf190, _PickedSurf189
** Constraint: Constraint-3
*Tie, name=Constraint-3, adjust=yes
_PickedSurf192, _PickedSurf191
** Constraint: Constraint-4
*Tie, name=Constraint-4, adjust=yes
_PickedSurf194, _PickedSurf193
** Constraint: Constraint-5
*Tie, name=Constraint-5, adjust=yes
_PickedSurf200, _PickedSurf199
** Constraint: Constraint-6
*Tie, name=Constraint-6, adjust=yes
_PickedSurf223, _PickedSurf222
** Constraint: Constraint-7
*Tie, name=Constraint-7, adjust=yes
_PickedSurf235, _PickedSurf234
** Constraint: Constraint-8
*Tie, name=Constraint-8, adjust=yes
_PickedSurf237, _PickedSurf236
*End Assembly
*Amplitude, name=Amp-1
             0.,              0.,             60.,           0.003,            120.,           0.006,            180.,           0.009
           240.,           0.012,            300.,           0.015,            360.,           0.018,            420.,           0.021
           480.,           0.024,            540.,           0.027,            600.,            0.03,            660.,           0.033
           720.,           0.036,            780.,           0.039,            840.,           0.042,            900.,           0.045
           960.,           0.048,           1020.,           0.051,           1080.,           0.054,           1140.,           0.057
          1200.,            0.06,           1260.,           0.063,           1320.,           0.066,           1380.,           0.069
          1440.,           0.072,           1500.,           0.075
**
** MATERIALS
**
*Material, name=gentle#3
*Density
 2.35e-06,
*Elastic
48000., 0.2
*Concrete Damaged Plasticity
30.,   0.66,   1.15,    0.1, 0.0001
*Concrete Compression Hardening
  40.,          0.
 45.7, 0.000136039
 51.4, 0.000307157
 57.1, 0.000496433
 62.9,  0.00071127
 68.6, 0.000966107
 74.3,  0.00129822
  80.,      0.0021
 74.3,  0.00290178
 68.6,  0.00323389
 62.9,  0.00348873
 57.1,  0.00370357
 51.4,  0.00389284
 45.7,  0.00406396
  40.,  0.00422132
 34.3,  0.00436779
  16.,  0.00478328
 6.86,      0.0111
   0.,      0.0191
*Concrete Tension Stiffening, type=DISPLACEMENT
5.,    0.
0., 0.028
*Material, name=steel
*Density
 7.89e-06,
*Elastic
209000., 0.269
** ----------------------------------------------------------------
**
** STEP: Step-1
**
*Step, name=Step-1, nlgeom=NO, inc=10000
*Static
0.1, 1500., 0.0001, 1.
**
** BOUNDARY CONDITIONS
**
** Name: BC-1 Type: Displacement/Rotation
*Boundary, amplitude=Amp-1
_PickedSet238, 1, 1
_PickedSet238, 2, 2, 1.
_PickedSet238, 3, 3
** Name: BC-2 Type: Displacement/Rotation
*Boundary
_PickedSet239, 1, 1
_PickedSet239, 2, 2
_PickedSet239, 3, 3
**
** OUTPUT REQUESTS
**
*Restart, write, frequency=0
**
** FIELD OUTPUT: bottom-224mm
**
*Output, field, frequency=3
*Node Output, nset=bottom-224mm
U,
**
** FIELD OUTPUT: bottom-4mm
**
*Node Output, nset=bottom-4mm
U,
**
** FIELD OUTPUT: bottom-50mm
**
*Node Output, nset=bottom-50mm
U,
**
** FIELD OUTPUT: top-224mm
**
*Node Output, nset=top-224mm
U,
**
** FIELD OUTPUT: top-4mm
**
*Node Output, nset=top-4mm
U,
**
** FIELD OUTPUT: top-50mm
**
*Node Output, nset=top-50mm
U,
**
** FIELD OUTPUT: F-Output-1
**
*Output, field, variable=PRESELECT, frequency=3
*Output, history, frequency=0
*End Step
