*Heading
** Job name: short-model Model name: short experimental material
** Generated by: Abaqus/CAE 2023
*Preprint, echo=NO, model=NO, history=NO, contact=NO
**
** PARTS
**
*Part, name=bottom
*Node
      1,           0.,          73.,         -50.
      2,           0.,          73.,           0.
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*Element, type=C3D8R
  1,  231,  239,   37,   36, 1247, 1255,  387,  388
  2,  239,  240,   38,   37, 1255, 1256,  386,  387
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*Nset, nset=_PickedSet19, internal, generate
    1,  2502,     1
*Elset, elset=_PickedSet19, internal, generate
    1,  1920,     1
** Section: specimen
*Solid Section, elset=_PickedSet19, material=experiment
,
*End Part
**
*Part, name="bottom plate"
*Node
      1,           0.,          50.,           0.
      2,           0.,          50.,         -50.
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*Element, type=C3D8R
   1,  267,  269,   37,   36, 1859, 1861,  417,  418
   2,  269,  270,   38,   37, 1861, 1862,  416,  417
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*Nset, nset=_PickedSet7, internal, generate
    1,  5004,     1
*Elset, elset=_PickedSet7, internal, generate
    1,  4224,     1
** Section: plate
*Solid Section, elset=_PickedSet7, material=steel
,
*End Part
**
*Part, name="notch bottom"
*Node
      1,           0.,          73.,           0.
      2,           0.,          73.,         -50.
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*Element, type=C3D10
  1,  204,   42,  269,   41,  692,  691,  690,  694,  693,  695
  2,   12,  269,   56,  201,  698,  697,  696,  700,  699,  701
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*Nset, nset=_PickedSet45, internal, generate
    1,  3969,     1
*Elset, elset=_PickedSet45, internal, generate
    1,  1909,     1
** Section: specimen
*Solid Section, elset=_PickedSet45, material=experiment
,
*End Part
**
*Part, name="notch middle"
*Node
      1,           0.,         76.5,          41.
      2,           0.,         76.5,           0.
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*Element, type=C3D8R
 1, 173, 180,  33,  32, 227, 234,  50,  51
 2, 180, 181,  34,  33, 234, 235,  49,  50
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*Nset, nset=_PickedSet71, internal, generate
   1,  598,    1
*Elset, elset=_PickedSet71, internal, generate
   1,  272,    1
** Section: specimen
*Solid Section, elset=_PickedSet71, material=experiment
,
*End Part
**
*Part, name="notch top"
*Node
      1,           0.,          77.,           0.
      2,           0.,          77.,          50.
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*Element, type=C3D10
  1,  305,  306,  237,  307,  691,  690,  689,  693,  692,  694
  2,  305,  237,  306,  241,  689,  690,  691,  696,  695,  697
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*Nset, nset=_PickedSet45, internal, generate
    1,  3964,     1
*Elset, elset=_PickedSet45, internal, generate
    1,  1906,     1
** Section: specimen
*Solid Section, elset=_PickedSet45, material=experiment
,
*End Part
**
*Part, name=top
*Node
      1,           0.,         100.,           0.
      2,           0.,         100.,          50.
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*Element, type=C3D8R
  1,  237,  239,   37,   36, 1253, 1255,  479,  478
  2,  239,  240,   38,   37, 1255, 1256,  480,  479
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*Nset, nset=_PickedSet13, internal, generate
    1,  2502,     1
*Elset, elset=_PickedSet13, internal, generate
    1,  1920,     1
** Section: specimen
*Solid Section, elset=_PickedSet13, material=experiment
,
*End Part
**
*Part, name="top plate"
*Node
      1,           0.,         155.,          50.
      2,           0.,         155.,           0.
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*Element, type=C3D8R
   1,  261,  269,   37,   36, 1853, 1861,  417,  418
   2,  269,  270,   38,   37, 1861, 1862,  416,  417
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*Nset, nset=_PickedSet2, internal, generate
    1,  5004,     1
*Elset, elset=_PickedSet2, internal, generate
    1,  4224,     1
** Section: plate
*Solid Section, elset=_PickedSet2, material=steel
,
*End Part
**
**
** ASSEMBLY
**
*Assembly, name=Assembly
**
*Instance, name=bottom-1, part=bottom
*End Instance
**
*Instance, name="notch bottom-1", part="notch bottom"
*End Instance
**
*Instance, name="notch middle-1", part="notch middle"
*End Instance
**
*Instance, name="notch top-1", part="notch top"
*End Instance
**
*Instance, name=top-1, part=top
*End Instance
**
*Instance, name="bottom plate-1", part="bottom plate"
*End Instance
**
*Instance, name="top plate-1", part="top plate"
*End Instance
**
*Nset, nset=bottom-4mm, instance=bottom-1
   1,   3,   7,   9,  29,  30
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*Nset, nset=bottom-50mm, instance=bottom-1
   5,   6,   8,  10,  65,  66
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*Nset, nset=bottom-224mm, instance=bottom-1
   46,   49,  115,  166,  396,  397
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*Nset, nset=end-section, instance="top plate-1"
    1,    2,    3,    7,    9,   11
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*Nset, nset=top-4mm, instance=top-1
   4,   6,   8,  10,  74,  75
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*Nset, nset=top-50mm, instance="top plate-1"
   5,   6,   8,  10,  83,  84
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*Nset, nset=top-224mm, instance=top-1
   46,   49,  115,  167,  411,  412
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*Nset, nset=_PickedSet341, internal, instance="top plate-1"
    1,    2,    3,    7,    9,   11
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*Elset, elset=_PickedSet341, internal, instance="top plate-1"
    1,    2,    3,    4,    5,    6
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*Nset, nset=_PickedSet342, internal, instance="bottom plate-1"
    4,    5,    6,    8,   10,   74
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*Elset, elset=_PickedSet342, internal, instance="bottom plate-1"
  961,  962,  963,  964,  965,  966
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*Elset, elset=__PickedSurf272_S1, internal, instance=bottom-1
    1,    2,    3,    4,    5,    6
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*Surface, type=ELEMENT, name=_PickedSurf272, internal
__PickedSurf272_S1, S1
*Elset, elset=__PickedSurf273_S2, internal, instance="notch bottom-1"
   57,  104,  214,  221,  285,  295
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*Elset, elset=__PickedSurf273_S1, internal, instance="notch bottom-1"
   29,   36,   37,   68,   91,  135
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*Elset, elset=__PickedSurf273_S3, internal, instance="notch bottom-1"
    3,    9,   20,   26,   59,   84
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*Elset, elset=__PickedSurf273_S4, internal, instance="notch bottom-1"
   15,   17,   35,   42,   43,  210
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*Surface, type=ELEMENT, name=_PickedSurf273, internal
__PickedSurf273_S2, S2
__PickedSurf273_S1, S1
__PickedSurf273_S4, S4
__PickedSurf273_S3, S3
*Elset, elset=__PickedSurf282_S2, internal, instance="notch middle-1", generate
   1,  272,    1
*Surface, type=ELEMENT, name=_PickedSurf282, internal
__PickedSurf282_S2, S2
*Elset, elset=__PickedSurf283_S3, internal, instance="notch bottom-1"
    7,   66,  112,  150,  161,  198
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*Elset, elset=__PickedSurf283_S2, internal, instance="notch bottom-1"
   44,   53,   65,   70,   72,   75
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*Elset, elset=__PickedSurf283_S1, internal, instance="notch bottom-1"
   46,   48,   55,   56,   63,   73
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*Elset, elset=__PickedSurf283_S4, internal, instance="notch bottom-1"
   51,   61,   67,   95,   97,  114
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*Surface, type=ELEMENT, name=_PickedSurf283, internal
__PickedSurf283_S3, S3
__PickedSurf283_S2, S2
__PickedSurf283_S4, S4
__PickedSurf283_S1, S1
*Elset, elset=__PickedSurf284_S1, internal, instance="notch middle-1", generate
   1,  272,    1
*Surface, type=ELEMENT, name=_PickedSurf284, internal
__PickedSurf284_S1, S1
*Elset, elset=__PickedSurf285_S2, internal, instance="notch top-1"
    1,   10,   12,   15,   20,   33
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*Elset, elset=__PickedSurf285_S1, internal, instance="notch top-1"
    6,   21,   27,   31,   36,   37
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*Elset, elset=__PickedSurf285_S4, internal, instance="notch top-1"
   13,   16,   17,   24,   35,   47
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*Elset, elset=__PickedSurf285_S3, internal, instance="notch top-1"
   19,   38,   39,  487,  494,  511
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*Surface, type=ELEMENT, name=_PickedSurf285, internal
__PickedSurf285_S2, S2
__PickedSurf285_S1, S1
__PickedSurf285_S4, S4
__PickedSurf285_S3, S3
*Elset, elset=__PickedSurf286_S2, internal, instance=top-1
  385,  386,  387,  388,  389,  390
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*Surface, type=ELEMENT, name=_PickedSurf286, internal
__PickedSurf286_S2, S2
*Elset, elset=__PickedSurf287_S1, internal, instance="notch top-1"
   22,   74,  103,  143,  166,  169
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*Elset, elset=__PickedSurf287_S2, internal, instance="notch top-1"
  108,  268,  284,  292,  301,  307
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*Elset, elset=__PickedSurf287_S4, internal, instance="notch top-1"
    5,   26,   55,  146,  153,  158
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*Elset, elset=__PickedSurf287_S3, internal, instance="notch top-1"
    3,    7,   44,   79,   80,   81
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*Surface, type=ELEMENT, name=_PickedSurf287, internal
__PickedSurf287_S1, S1
__PickedSurf287_S2, S2
__PickedSurf287_S4, S4
__PickedSurf287_S3, S3
*Elset, elset=__PickedSurf318_S2, internal, instance=bottom-1
  385,  386,  387,  388,  389,  390
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*Surface, type=ELEMENT, name=_PickedSurf318, internal
__PickedSurf318_S2, S2
*Elset, elset=__PickedSurf320_S1, internal, instance=top-1
    1,    2,    3,    4,    5,    6
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*Surface, type=ELEMENT, name=_PickedSurf320, internal
__PickedSurf320_S1, S1
*Elset, elset=__PickedSurf339_S2, internal, instance="top plate-1"
  961,  962,  963,  964,  965,  966
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*Surface, type=ELEMENT, name=_PickedSurf339, internal
__PickedSurf339_S2, S2
*Elset, elset=__PickedSurf340_S1, internal, instance="bottom plate-1"
    1,    2,    3,    4,    5,    6
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*Surface, type=ELEMENT, name=_PickedSurf340, internal
__PickedSurf340_S1, S1
** Constraint: Constraint-1
*Tie, name=Constraint-1, adjust=yes
_PickedSurf273, _PickedSurf272
** Constraint: Constraint-2
*Tie, name=Constraint-2, adjust=yes
_PickedSurf283, _PickedSurf282
** Constraint: Constraint-3
*Tie, name=Constraint-3, adjust=yes
_PickedSurf285, _PickedSurf284
** Constraint: Constraint-4
*Tie, name=Constraint-4, adjust=yes
_PickedSurf287, _PickedSurf286
** Constraint: Constraint-5
*Tie, name=Constraint-5, adjust=yes
_PickedSurf318, _PickedSurf340
** Constraint: Constraint-6
*Tie, name=Constraint-6, adjust=yes
_PickedSurf320, _PickedSurf339
*End Assembly
*Amplitude, name=Amp-1
             0.,              0.,             60.,           0.003,            120.,           0.006,            180.,           0.009
           240.,           0.012,            300.,           0.015,            360.,           0.018,            420.,           0.021
           480.,           0.024,            540.,           0.027,            600.,            0.03,            660.,           0.033
           720.,           0.036,            780.,           0.039,            840.,           0.042,            900.,           0.045
           960.,           0.048,           1020.,           0.051,           1080.,           0.054,           1140.,           0.057
          1200.,            0.06,           1260.,           0.063,           1320.,           0.066,           1380.,           0.069
          1440.,           0.072,           1500.,           0.075
**
** MATERIALS
**
*Material, name=experiment
*Density
 2.35e-06,
*Elastic
48000., 0.2
*Concrete Damaged Plasticity
30.,   0.66,   1.15,    0.1, 0.0001
*Concrete Compression Hardening
  40.,          0.
 45.7, 0.000136039
 51.4, 0.000307157
 57.1, 0.000496433
 62.9,  0.00071127
 68.6, 0.000966107
 74.3,  0.00129822
  80.,      0.0021
 74.3,  0.00290178
 68.6,  0.00323389
 62.9,  0.00348873
 57.1,  0.00370357
 51.4,  0.00389284
 45.7,  0.00406396
  40.,  0.00422132
 34.3,  0.00436779
  16.,  0.00478328
 6.86,      0.0111
   0.,      0.0191
*Concrete Tension Stiffening, type=DISPLACEMENT
  4.40971,         0.
  4.23333,     0.0025
  4.14513, 0.00479883
  3.63149, 0.00644029
  3.21454, 0.00764356
  2.64823, 0.00934852
   1.5875,  0.0121001
  1.34488,  0.0136509
 0.863807,  0.0198597
 0.321316,  0.0417045
       0.,  0.0557324
*Material, name=steel
*Density
 7.89e-06,
*Elastic
209000., 0.269
** ----------------------------------------------------------------
**
** STEP: Step-1
**
*Step, name=Step-1, nlgeom=NO, inc=10000
*Static
0.1, 1500., 0.0001, 1.
**
** BOUNDARY CONDITIONS
**
** Name: BC-1 Type: Displacement/Rotation
*Boundary, amplitude=Amp-1
_PickedSet341, 1, 1
_PickedSet341, 2, 2, 1.
_PickedSet341, 3, 3
_PickedSet341, 4, 4
_PickedSet341, 5, 5
_PickedSet341, 6, 6
** Name: BC-2 Type: Displacement/Rotation
*Boundary
_PickedSet342, 1, 1
_PickedSet342, 2, 2
_PickedSet342, 3, 3
_PickedSet342, 4, 4
_PickedSet342, 5, 5
_PickedSet342, 6, 6
**
** OUTPUT REQUESTS
**
*Restart, write, frequency=0
**
** FIELD OUTPUT: bottom-224mm
**
*Output, field, frequency=3
*Node Output, nset=bottom-224mm
UT,
**
** FIELD OUTPUT: bottom-4mm
**
*Node Output, nset=bottom-4mm
UT,
**
** FIELD OUTPUT: bottom-50mm
**
*Node Output, nset=bottom-50mm
UT,
**
** FIELD OUTPUT: reaction force
**
*Node Output, nset=end-section
RF,
**
** FIELD OUTPUT: top-224mm
**
*Node Output, nset=top-224mm
UT,
**
** FIELD OUTPUT: top-4mm
**
*Node Output, nset=top-4mm
UT,
**
** FIELD OUTPUT: top-50mm
**
*Node Output, nset=top-50mm
UT,
**
** FIELD OUTPUT: F-Output-1
**
*Output, field, variable=PRESELECT, frequency=3
*Output, history, frequency=0
*End Step
